<?xml version="1.0"?>

<piston_engine name="motorglider engine">
	<minmp unit="INHG">		   14.0  </minmp>
	<maxmp unit="INHG">		   28.0  </maxmp>
	<displacement unit="CC"> 1500</displacement>
	<cylinders>					4.0  </cylinders>
	<compression-ratio>			10  </compression-ratio>
	<maxhp> 				  120.0  </maxhp>
	<cycles>				   4.0  </cycles>
	<idlerpm>				 1203.0  </idlerpm>
	<maxrpm>				 7000.0  </maxrpm>
	<sparkfaildrop>				0.1  </sparkfaildrop>
	<volumetric-efficiency>		1.05 </volumetric-efficiency>
	<air-intake-impedance-factor>0.25</air-intake-impedance-factor>
	<numboostspeeds>2</numboostspeeds>
	<boost-loss-factor>0.2</boost-loss-factor> <!-- It's a turbo, not a goddamned super. This should probably be lower(!)-->
	<ratedboost1>         5 </ratedboost1>
	<ratedpower1>       180 </ratedpower1>
	<ratedrpm1>        7000 </ratedrpm1>
	<ratedaltitude1>   4000 </ratedaltitude1>
	<ratedboost1>         4 </ratedboost1>
	<ratedpower1>       120 </ratedpower1>
	<ratedrpm1>        7000 </ratedrpm1>
	<ratedaltitude1>  11000 </ratedaltitude1>
	<man-press-lag>     0.8 </man-press-lag> <!-- to simulate turbo lag -->
	<boostmanual>         0 </boostmanual>
	<!-- Optional items that affect engine performance -->
	<!-- Defining <bsfc> over-rides the built-in horsepower calculations -->
	<!-- <bsfc>						0.326</bsfc> -->
</piston_engine>
